*HEADING
(b) HGO anisotropic skin + pretension - 3D quarter model (C3D8R)
Fibers +-gamma about x-axis; x=0,y=0 symmetry planes
Units: mm, N, MPa, tonne, s
*NODE
1, 0.00000, 0.00000, 0.00000
2, 0.12500, 0.00000, 0.00000
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*ELEMENT, TYPE=C3D8R
1, 1,2,102,101, 10001,10002,10102,10101
2, 2,3,103,102, 10002,10003,10103,10102
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*ELSET, ELSET=SKIN, GENERATE
1, 91112, 1
*SURFACE, TYPE=ELEMENT, NAME=SKIN_SURF
SKIN,
*NSET, NSET=PBOT
1, 2, 3, 4, 5, 6
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*NSET, NSET=XSYM
1, 101, 201, 301, 401, 501
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*NSET, NSET=YSYM
1, 2, 3, 4, 5, 6
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*NSET, NSET=XOUT
13, 113, 213, 313, 413, 513
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*NSET, NSET=YOUT
1201, 1202, 1203, 1204, 1205, 1206
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*NODE
9999, 0.0, 0.0, 1.22000
*NSET, NSET=NREF
9999,
*SURFACE, TYPE=REVOLUTION, NAME=NEEDLE, FILLET RADIUS=0.01
0.,0.,0., 0.,0.,1.
START, 0.02, 1.22000
LINE,  0.15, 1.60000
LINE,  0.15, 3.00000
*RIGID BODY, ANALYTICAL SURFACE=NEEDLE, REF NODE=NREF
*MATERIAL, NAME=DERMIS_HGO
*DENSITY
1.1e-9,
*USER MATERIAL, CONSTANTS=8
0.02, 1.0, 0.5, 8.0, 0.2, 30.0, 1.6, 2.3
*DEPVAR, DELETE=1
4
1, DELFLAG, deletion flag
2, LAMMAX, max principal stretch
3, DAMAGE, damage variable
4, JVOL, relative volume
*SOLID SECTION, ELSET=SKIN, MATERIAL=DERMIS_HGO
*AMPLITUDE, NAME=PRE, DEFINITION=SMOOTH STEP, TIME=STEP TIME
0.0, 0.0, 0.005, 1.0
*AMPLITUDE, NAME=PUSH, DEFINITION=SMOOTH STEP, TIME=STEP TIME
0.0, 0.0, 0.010, 1.0
*SURFACE INTERACTION, NAME=IPROP
*FRICTION
0.1,
*SURFACE BEHAVIOR, PRESSURE-OVERCLOSURE=HARD
*STEP, NAME=PRETENSION
*DYNAMIC, EXPLICIT
, 0.005
*FIXED MASS SCALING, DT=5.0e-7, TYPE=BELOW MIN
*BOUNDARY
XSYM, 1, 1
YSYM, 2, 2
PBOT, 3, 3
NREF, 1, 6
*BOUNDARY, AMPLITUDE=PRE
XOUT, 1, 1, 0.15000
YOUT, 2, 2, 0.15000
*CONTACT
*CONTACT INCLUSIONS, ALL EXTERIOR
*CONTACT INCLUSIONS
NEEDLE, SKIN_SURF
*CONTACT PROPERTY ASSIGNMENT
 ,  , IPROP
*OUTPUT, FIELD, NUMBER INTERVAL=5
*ELEMENT OUTPUT, ELSET=SKIN
S, LE, SDV, STATUS
*NODE OUTPUT
U
*END STEP
*STEP, NAME=INSERTION
*DYNAMIC, EXPLICIT
, 0.010
*FIXED MASS SCALING, DT=5.0e-7, TYPE=BELOW MIN
*BOUNDARY, OP=NEW
XSYM, 1, 1
YSYM, 2, 2
PBOT, 3, 3
XOUT, 1, 1, 0.15000
YOUT, 2, 2, 0.15000
NREF, 1, 1
NREF, 2, 2
NREF, 4, 6
*BOUNDARY, AMPLITUDE=PUSH
NREF, 3, 3, -1.00000
*OUTPUT, FIELD, NUMBER INTERVAL=25
*ELEMENT OUTPUT, ELSET=SKIN
S, LE, SDV, STATUS
*NODE OUTPUT
U, V
*OUTPUT, HISTORY, TIME INTERVAL=1.0e-4
*NODE OUTPUT, NSET=NREF
U3, V3, RF3
*ENERGY OUTPUT
ALLIE, ALLKE, ALLSE, ALLWK
*END STEP
