*HEADING
(1) Path-refined axisymmetric 3-layer skin penetration (CAX4R + VUMAT)
Biased mesh: fine near axis r=0 and near top surface (stratum corneum)
Units: mm, N, MPa, tonne, s
*NODE
1, 0.000000, 0.000000
2, 0.030000, 0.000000
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*ELEMENT, TYPE=CAX4R
1, 1, 2, 1002, 1001
2, 2, 3, 1003, 1002
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*ELSET, ELSET=STRATUM
331, 332, 333, 334, 335, 336
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*ELSET, ELSET=EPIDERMIS
243, 244, 245, 246, 247, 248
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*ELSET, ELSET=DERMIS
1, 2, 3, 4, 5, 6
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*ELSET, ELSET=SKIN_ALL
STRATUM, EPIDERMIS, DERMIS
*SURFACE, TYPE=ELEMENT, NAME=SKIN_SURF
SKIN_ALL,
*NSET, NSET=NBOT
1, 2, 3, 4, 5, 6
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*NSET, NSET=NAXIS
1, 1001, 2001, 3001, 4001, 5001
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*NSET, NSET=NRIGHT
23, 1023, 2023, 3023, 4023, 5023
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*NODE
9999, 0.0, 1.52000
*NSET, NSET=NREF
9999,
*SURFACE, TYPE=SEGMENTS, NAME=NEEDLE, FILLET RADIUS=0.01
START, 0.02, 1.52000
LINE,  0.15, 1.90000
LINE,  0.15, 3.50000
*RIGID BODY, ANALYTICAL SURFACE=NEEDLE, REF NODE=NREF
*MATERIAL, NAME=MAT_SC
*DENSITY
1.2e-9,
*USER MATERIAL, CONSTANTS=4
1.0, 0.02, 1.2, 1.5
*DEPVAR, DELETE=1
4
1, DELFLAG, deletion flag
2, LAMMAX, max principal stretch
3, DAMAGE, damage variable
4, JVOL, relative volume
*MATERIAL, NAME=MAT_EPI
*DENSITY
1.1e-9,
*USER MATERIAL, CONSTANTS=4
0.1, 0.1, 1.4, 1.9
*DEPVAR, DELETE=1
4
1, DELFLAG, deletion flag
2, LAMMAX, max principal stretch
3, DAMAGE, damage variable
4, JVOL, relative volume
*MATERIAL, NAME=MAT_DERM
*DENSITY
1.1e-9,
*USER MATERIAL, CONSTANTS=4
0.02, 1.0, 1.6, 2.5
*DEPVAR, DELETE=1
4
1, DELFLAG, deletion flag
2, LAMMAX, max principal stretch
3, DAMAGE, damage variable
4, JVOL, relative volume
*SOLID SECTION, ELSET=STRATUM, MATERIAL=MAT_SC
*SOLID SECTION, ELSET=EPIDERMIS, MATERIAL=MAT_EPI
*SOLID SECTION, ELSET=DERMIS, MATERIAL=MAT_DERM
*BOUNDARY
NBOT, 2, 2
NAXIS, 1, 1
NRIGHT, 1, 1
NREF, 1, 1
NREF, 6, 6
*AMPLITUDE, NAME=PUSH, DEFINITION=SMOOTH STEP
0.0, 0.0, 0.01, 1.0
*STEP, NAME=PENETRATION
*DYNAMIC, EXPLICIT
, 0.01
*FIXED MASS SCALING, DT=2.0e-7, TYPE=BELOW MIN
*BOUNDARY, AMPLITUDE=PUSH
NREF, 2, 2, -1.2
*CONTACT
*CONTACT INCLUSIONS, ALL EXTERIOR
*CONTACT INCLUSIONS
NEEDLE, SKIN_SURF
*CONTACT PROPERTY ASSIGNMENT
 ,  , IPROP
*SURFACE INTERACTION, NAME=IPROP
*FRICTION
0.1,
*OUTPUT, FIELD, NUMBER INTERVAL=25
*ELEMENT OUTPUT, ELSET=SKIN_ALL
S, LE, SDV, STATUS
*NODE OUTPUT
U, V
*OUTPUT, HISTORY, TIME INTERVAL=1.0e-4
*NODE OUTPUT, NSET=NREF
U2, V2, RF2
*ENERGY OUTPUT
ALLIE, ALLKE, ALLSE, ALLWK
*END STEP
