*HEADING
(4) Cohesive-layer cutting - plane strain, needle wedge splits skin
Bulk: built-in Neo-Hookean; center x=0: cohesive traction-separation
Units: mm, N, MPa, tonne, s
*NODE
1, -1.000000, 0.000000
2, -0.851290, 0.000000
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*ELEMENT, TYPE=CPE4R
1, 1, 2, 1002, 1001
2, 2, 3, 1003, 1002
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*ELEMENT, TYPE=COH2D4
481, 16, 1016, 1001000, 1000000
482, 1016, 2016, 1002000, 1001000
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*ELSET, ELSET=BULK, GENERATE
1, 480, 1
*ELSET, ELSET=COH, GENERATE
481, 496, 1
*SURFACE, TYPE=ELEMENT, NAME=SKIN_SURF
BULK,
*NSET, NSET=NBOT
1, 2, 3, 4, 5, 6
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*NODE
9999, 0.0, 1.22000
*NSET, NSET=NREF
9999,
*SURFACE, TYPE=SEGMENTS, NAME=NEEDLE, FILLET RADIUS=0.01
START, -0.20, 1.80000
LINE,   0.00, 1.22000
LINE,   0.20, 1.80000
*RIGID BODY, ANALYTICAL SURFACE=NEEDLE, REF NODE=NREF
*MATERIAL, NAME=SKIN
*DENSITY
1.1e-9,
*HYPERELASTIC, NEO HOOKE
0.05, 0.5
*SOLID SECTION, ELSET=BULK, MATERIAL=SKIN
*MATERIAL, NAME=COHMAT
*DENSITY
1.1e-9,
*ELASTIC, TYPE=TRACTION
1000.0, 1000.0, 1000.0
*DAMAGE INITIATION, CRITERION=MAXS
0.15, 0.15, 0.15
*DAMAGE EVOLUTION, TYPE=ENERGY
0.01,
*COHESIVE SECTION, ELSET=COH, MATERIAL=COHMAT, RESPONSE=TRACTION SEPARATION, THICKNESS=SPECIFIED
1.0,
*SURFACE INTERACTION, NAME=IPROP
*FRICTION
0.1,
*SURFACE BEHAVIOR, PRESSURE-OVERCLOSURE=HARD
*BOUNDARY
NBOT, 1, 2
NREF, 1, 1
NREF, 6, 6
*AMPLITUDE, NAME=PUSH, DEFINITION=SMOOTH STEP
0.0, 0.0, 0.01, 1.0
*STEP, NAME=CUT
*DYNAMIC, EXPLICIT
, 0.01
*FIXED MASS SCALING, DT=5.0e-7, TYPE=BELOW MIN
*BOUNDARY, AMPLITUDE=PUSH
NREF, 2, 2, -0.8
*CONTACT
*CONTACT INCLUSIONS, ALL EXTERIOR
*CONTACT INCLUSIONS
NEEDLE, SKIN_SURF
*CONTACT PROPERTY ASSIGNMENT
 ,  , IPROP
*OUTPUT, FIELD, NUMBER INTERVAL=25
*ELEMENT OUTPUT, ELSET=BULK
S, LE
*ELEMENT OUTPUT, ELSET=COH
SDEG, STATUS
*NODE OUTPUT
U, V
*OUTPUT, HISTORY, TIME INTERVAL=1.0e-4
*NODE OUTPUT, NSET=NREF
U2, V2, RF2
*ENERGY OUTPUT
ALLIE, ALLKE, ALLSE, ALLDMD
*END STEP
