*HEADING
[A] Discrete-rigid hollow microneedle -> 3-layer skin (um, axisym)
Units: um, uN, MPa, s ; needle=RAX2 discrete rigid, two-sided contact
*NODE
1, 0.0000, 0.0000
2, 5.0000, 0.0000
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*ELEMENT, TYPE=CAX4R
1, 1, 2, 100002, 100001
2, 2, 3, 100003, 100002
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*ELSET, ELSET=STRATUM
1827, 1828, 1829, 1830, 1831, 1832
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*ELSET, ELSET=EPIDERMIS
1163, 1164, 1165, 1166, 1167, 1168
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*ELSET, ELSET=DERMIS
1, 2, 3, 4, 5, 6
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*ELSET, ELSET=SKIN_ALL
STRATUM, EPIDERMIS, DERMIS
*SURFACE, TYPE=ELEMENT, NAME=SKIN_SURF
SKIN_ALL,
*NSET, NSET=NBOT
1, 2, 3, 4, 5, 6
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*NSET, NSET=NAXIS
1, 100001, 200001, 300001, 400001, 500001
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*NSET, NSET=NRIGHT
84, 100084, 200084, 300084, 400084, 500084
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**
** --- Discrete rigid hollow needle (RAX2, filleted tip) ---
**  outer wall R=150 -> taper -> annular tip (R=30..50) -> bore wall R=30
**  tip corners rounded: outer rf=8, inner rf=5 um
*NODE
5000000, 150.0000, 3550.0000
5000001, 150.0000, 3520.1754
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*NSET, NSET=NREF
9999,
*ELEMENT, TYPE=RAX2, ELSET=NEEDLE_EL
800000, 5000000, 5000001
800001, 5000001, 5000002
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*RIGID BODY, REF NODE=NREF, ELSET=NEEDLE_EL
*SURFACE, TYPE=ELEMENT, NAME=NEEDLE
NEEDLE_EL,
*MATERIAL, NAME=MAT_STRATUM
*DENSITY
1.2e-15,
*USER MATERIAL, CONSTANTS=4
1.0, 0.02, 1.2, 1.5
*DEPVAR, DELETE=1
4
1, DELFLAG, deletion flag
2, LAMMAX, max principal stretch
3, DAMAGE, damage variable
4, JVOL, relative volume
*MATERIAL, NAME=MAT_EPIDERMIS
*DENSITY
1.1e-15,
*USER MATERIAL, CONSTANTS=4
0.1, 0.1, 1.4, 1.9
*DEPVAR, DELETE=1
4
1, DELFLAG, deletion flag
2, LAMMAX, max principal stretch
3, DAMAGE, damage variable
4, JVOL, relative volume
*MATERIAL, NAME=MAT_DERMIS
*DENSITY
1.1e-15,
*USER MATERIAL, CONSTANTS=4
0.02, 1.0, 1.6, 2.5
*DEPVAR, DELETE=1
4
1, DELFLAG, deletion flag
2, LAMMAX, max principal stretch
3, DAMAGE, damage variable
4, JVOL, relative volume
*SOLID SECTION, ELSET=STRATUM, MATERIAL=MAT_STRATUM
*SOLID SECTION, ELSET=EPIDERMIS, MATERIAL=MAT_EPIDERMIS
*SOLID SECTION, ELSET=DERMIS, MATERIAL=MAT_DERMIS
*SURFACE INTERACTION, NAME=IPROP
*FRICTION
0.1,
*SURFACE BEHAVIOR, PRESSURE-OVERCLOSURE=HARD
*BOUNDARY
NBOT, 2, 2
NAXIS, 1, 1
NRIGHT, 1, 1
NREF, 1, 1
NREF, 6, 6
*AMPLITUDE, NAME=PUSH, DEFINITION=SMOOTH STEP
0.0, 0.0, 0.03, 1.0
*STEP, NAME=PENETRATION
*DYNAMIC, EXPLICIT
, 0.03
*FIXED MASS SCALING, DT=2.0e-7, TYPE=BELOW MIN
*BOUNDARY, AMPLITUDE=PUSH
NREF, 2, 2, -1200.0
*CONTACT
*CONTACT INCLUSIONS, ALL EXTERIOR
*CONTACT INCLUSIONS
NEEDLE, SKIN_SURF
*CONTACT PROPERTY ASSIGNMENT
 ,  , IPROP
*OUTPUT, FIELD, NUMBER INTERVAL=30
*ELEMENT OUTPUT, ELSET=SKIN_ALL
S, LE, SDV, STATUS
*NODE OUTPUT
U, V
*OUTPUT, HISTORY, TIME INTERVAL=1.0e-4
*NODE OUTPUT, NSET=NREF
U2, V2, RF2
*ENERGY OUTPUT
ALLIE, ALLKE, ALLSE, ALLWK
*END STEP
