*HEADING
[C] user VUMAT CZM : axisymmetric cohesive cutting (coring incision)
Bulk: built-in Neo-Hookean; r=50 um: COHAX4 traction-separation
Units: um, uN, MPa, s
*NODE
1, 0.0000, 0.0000
2, 5.0000, 0.0000
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*ELEMENT, TYPE=CAX4R
1, 1, 2, 10002, 10001
2, 2, 3, 10003, 10002
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*ELEMENT, TYPE=COHAX4
3301, 11, 10011, 5010000, 5000000
3302, 10011, 20011, 5020000, 5010000
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*ELSET, ELSET=CORE, GENERATE
1, 600, 1
*ELSET, ELSET=OUTER, GENERATE
601, 3300, 1
*ELSET, ELSET=BULK
CORE, OUTER
*ELSET, ELSET=COH, GENERATE
3301, 3360, 1
*SURFACE, TYPE=ELEMENT, NAME=SKIN_SURF
BULK,
*NSET, NSET=NBOT
1, 2, 3, 4, 5, 6
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*NSET, NSET=NAXIS, GENERATE
1, 600001, 10000
*NSET, NSET=NRIGHT, GENERATE
5000045, 5600045, 10000
*NODE
9999, 0.0, 820.0000
*NSET, NSET=NREF
9999,
*SURFACE, TYPE=SEGMENTS, NAME=NEEDLE, FILLET RADIUS=5.0
START, 50.0000, 1420.0000
LINE,  50.0000, 870.0000
CIRCL, 0.0, 820.0000, 0.0, 870.0000
*RIGID BODY, ANALYTICAL SURFACE=NEEDLE, REF NODE=NREF
*MATERIAL, NAME=SKIN
*DENSITY
1.1e-15,
*HYPERELASTIC, NEO HOOKE
0.05, 0.5
*SOLID SECTION, ELSET=BULK, MATERIAL=SKIN
*MATERIAL, NAME=COHMAT
*DENSITY
1.1e-15,
*USER MATERIAL, CONSTANTS=5
4, 2, 10, 1, 1.0
*DEPVAR, DELETE=6
7
1, EPSN, normal nominal strain
2, EPSS1, shear1 nominal strain
3, EPSS2, shear2 nominal strain
4, DMAX, max effective separation
5, SDEG, damage
6, STATUS, delete flag
7, DELM, effective separation
*COHESIVE SECTION, ELSET=COH, MATERIAL=COHMAT, RESPONSE=TRACTION SEPARATION, THICKNESS=SPECIFIED
1,
*SURFACE INTERACTION, NAME=IPROP
*FRICTION
0.1,
*SURFACE BEHAVIOR, PRESSURE-OVERCLOSURE=HARD
*BOUNDARY
NBOT, 2, 2
NAXIS, 1, 1
NRIGHT, 1, 1
NREF, 1, 1
NREF, 6, 6
*AMPLITUDE, NAME=PUSH, DEFINITION=SMOOTH STEP
0.0, 0.0, 0.02, 1.0
*STEP, NAME=CUT
*DYNAMIC, EXPLICIT
, 0.02
*FIXED MASS SCALING, DT=2.0e-7, TYPE=BELOW MIN
*BOUNDARY, AMPLITUDE=PUSH
NREF, 2, 2, -500.0
*CONTACT
*CONTACT INCLUSIONS, ALL EXTERIOR
*CONTACT INCLUSIONS
NEEDLE, SKIN_SURF
*CONTACT PROPERTY ASSIGNMENT
 ,  , IPROP
*OUTPUT, FIELD, NUMBER INTERVAL=25
*ELEMENT OUTPUT, ELSET=BULK
S, LE
*ELEMENT OUTPUT, ELSET=COH
SDV, STATUS
*NODE OUTPUT
U, V
*OUTPUT, HISTORY, TIME INTERVAL=1.0e-4
*NODE OUTPUT, NSET=NREF
U2, V2, RF2
*ENERGY OUTPUT
ALLIE, ALLKE, ALLSE, ALLDMD
*END STEP
