*HEADING
[16] Needle puncture of skin (solid cone) - 3 layers
hyperelastic + cohesive + layer damage(deletion) ; Units um,uN,MPa,s
*NODE
1, 0.0000, 0.0000
2, 5.0000, 0.0000
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*ELEMENT, TYPE=CAX4R
1, 1, 2, 10002, 10001
2, 2, 3, 10003, 10002
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*ELEMENT, TYPE=COHAX4
2108, 21, 10021, 5010000, 5000000
2109, 10021, 20021, 5020000, 5010000
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*ELSET, ELSET=EPIDERMIS
1678, 1679, 1680, 1681, 1682, 1683
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*ELSET, ELSET=DERMIS
1119, 1120, 1121, 1122, 1123, 1124
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*ELSET, ELSET=HYPODERMIS
1, 2, 3, 4, 5, 6
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*ELSET, ELSET=BULK
EPIDERMIS, DERMIS, HYPODERMIS
*ELSET, ELSET=COH, GENERATE
2108, 2156, 1
*SURFACE, TYPE=ELEMENT, NAME=SKIN_SURF
BULK,
*NSET, NSET=NBOT
1, 2, 3, 4, 5, 6
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*NSET, NSET=NAXIS, GENERATE
1, 490001, 10000
*NSET, NSET=NRIGHT, GENERATE
5000023, 5490023, 10000
*NODE
9999, 0.0, 1530.0000
*NSET, NSET=NREF
9999,
*SURFACE, TYPE=SEGMENTS, NAME=NEEDLE, FILLET RADIUS=5.0
START, 100.0000, 3530.0000
LINE,  100.0000, 1930.0000
LINE,  0.0, 1530.0000
*RIGID BODY, ANALYTICAL SURFACE=NEEDLE, REF NODE=NREF
*MATERIAL, NAME=MAT_EPIDERMIS
*DENSITY
1.2e-15,
*USER MATERIAL, CONSTANTS=4
0.2, 0.05, 1.3, 1.7
*DEPVAR, DELETE=1
4
1, DELFLAG, deletion flag
2, LAMMAX, max principal stretch
3, DAMAGE, damage variable
4, JVOL, relative volume
*MATERIAL, NAME=MAT_DERMIS
*DENSITY
1.1e-15,
*USER MATERIAL, CONSTANTS=4
0.05, 0.5, 1.5, 2.2
*DEPVAR, DELETE=1
4
1, DELFLAG, deletion flag
2, LAMMAX, max principal stretch
3, DAMAGE, damage variable
4, JVOL, relative volume
*MATERIAL, NAME=MAT_HYPODERMIS
*DENSITY
1.1e-15,
*USER MATERIAL, CONSTANTS=4
0.01, 2.0, 1.6, 2.8
*DEPVAR, DELETE=1
4
1, DELFLAG, deletion flag
2, LAMMAX, max principal stretch
3, DAMAGE, damage variable
4, JVOL, relative volume
*SECTION CONTROLS, NAME=SKINCTRL, HOURGLASS=ENHANCED
*SOLID SECTION, ELSET=EPIDERMIS, MATERIAL=MAT_EPIDERMIS, CONTROLS=SKINCTRL
*SOLID SECTION, ELSET=DERMIS, MATERIAL=MAT_DERMIS, CONTROLS=SKINCTRL
*SOLID SECTION, ELSET=HYPODERMIS, MATERIAL=MAT_HYPODERMIS, CONTROLS=SKINCTRL
*MATERIAL, NAME=COHMAT
*DENSITY
1.1e-15,
*ELASTIC, TYPE=TRACTION
4, 4, 4
*DAMAGE INITIATION, CRITERION=MAXS
2, 2, 2
*DAMAGE EVOLUTION, TYPE=ENERGY
5,
*COHESIVE SECTION, ELSET=COH, MATERIAL=COHMAT, RESPONSE=TRACTION SEPARATION, THICKNESS=SPECIFIED
1,
*SURFACE INTERACTION, NAME=IPROP
*FRICTION
0.1,
*SURFACE BEHAVIOR, PRESSURE-OVERCLOSURE=HARD
*BOUNDARY
NBOT, 2, 2
NAXIS, 1, 1
NRIGHT, 1, 1
NREF, 1, 1
NREF, 6, 6
*AMPLITUDE, NAME=PUSH, DEFINITION=SMOOTH STEP
0.0, 0.0, 0.03, 1.0
*STEP, NAME=PUNCTURE
*DYNAMIC, EXPLICIT
, 0.03
*FIXED MASS SCALING, DT=2.0e-7, TYPE=BELOW MIN
*BOUNDARY, AMPLITUDE=PUSH
NREF, 2, 2, -800.0
*CONTACT
*CONTACT INCLUSIONS, ALL EXTERIOR
*CONTACT INCLUSIONS
NEEDLE, SKIN_SURF
*CONTACT PROPERTY ASSIGNMENT
 ,  , IPROP
*OUTPUT, FIELD, NUMBER INTERVAL=30
*ELEMENT OUTPUT, ELSET=BULK
S, LE, SDV, STATUS
*ELEMENT OUTPUT, ELSET=COH
SDEG, STATUS
*NODE OUTPUT
U, V
*OUTPUT, HISTORY, TIME INTERVAL=1.0e-4
*NODE OUTPUT, NSET=NREF
U2, V2, RF2
*ENERGY OUTPUT
ALLIE, ALLKE, ALLSE, ALLDMD, ALLWK
*END STEP
