# OpenSim document version 40600
# ScaleTool 템플릿.
# 대문자 자리표시자(앞뒤를 @ 로 감싼 형태)는 msk_engine.steps.render_setup_xml 이 치환한다.
# 치환되지 않은 자리표시자가 남으면 실행 전에 실패하므로,
# 주석에도 치환 대상이 아닌 자리표시자 형태를 쓰지 말 것.
# 주의: MarkerPlacer 의 마커 가중치는 모델·마커셋에 맞춰 조정해야 한다.
# 아래 값은 자리표시자이며, 실제 값은 ADR 로 근거를 남기고 정할 것.
ScaleTool wmit_scale:
  mass: @SUBJECT_MASS@
  height: @SUBJECT_HEIGHT@
  age: -1
  notes: WMIT MSK engine — generated, do not edit by hand
  GenericModelMaker generic:
    model_file: @MODEL_FILE@
  ModelScaler scaler:
    apply: true
    scaling_order: measurements
    marker_file: @STATIC_TRIAL@
    time_range: @STATIC_TIME_START@ @STATIC_TIME_END@
    preserve_mass_distribution: true
    output_model_file: @SCALED_MODEL@
    output_scale_file: @SCALE_FACTORS@
  MarkerPlacer placer:
    apply: true
    marker_file: @STATIC_TRIAL@
    time_range: @STATIC_TIME_START@ @STATIC_TIME_END@
    output_model_file: @SCALED_MODEL@
    output_marker_file: @RUN_DIR@/results/scaled_markers.xml
